*Heading
*Preprint, echo=NO, model=NO, history=NO, contact=NO
**  ----------------------------------------------------------  **
*Node, nset=node_all
1	,	0	,	0
2	,	2	,	0
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**  ----------------------------------------------------------  **
*Element, type=CPS4R
1	,	1	,	2	,	205	,	204
2	,	2	,	3	,	206	,	205
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**  ----------------------------------------------------------  **
*Elset, elset = Set-1-FRACTURE, generate
	1, 10076, 1
*Elset, elset = Set-1-elastic, generate
	10077, 10236, 1
**  ----------------------------------------------------------  **
** Section: Section-1
*Solid Section, elset=Set-1-FRACTURE, material=MAT1
  1.0
*Solid Section, elset=Set-1-elastic, material=ELASTICITY
  1.0
**  ----------------------------------------------------------  **
*User Element, Nodes=4, Type=VU2, Properties=4, Coordinates=2, Variables=20
	11
*Element, Type=VU2
100001	,	1	,	2	,	205	,	204
100002	,	2	,	3	,	206	,	205
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**  ----------------------------------------------------------  **
*Elset, elset=fracture, generate
	100001, 110076, 1
**  ----------------------------------------------------------  **
*Uel Property, Elset=fracture
	50000, 7.0, 10.0, 10
**  ----------------------------------------------------------  **
*Material, name=ELASTICITY
*Density
	1e-6
*Elastic
	210000., 0.0
**
*Material, name=MAT1
*Density
	1e-6
*Depvar, delete=16
     16,
     1,  Ele_Iden, "element identification"
     11, PHI_A, "Phi plus (Model A)"
     14, H, "History variable"
     15, d, "phase field variable"
*User Defined Field
*User Material, constants=5
	50000, 7.0, 10.0, 10
**
**  ----------------------------------------------------------  **
**
** PREDEFINED FIELDS
**
** Name: Predefined Field-1   Type: Void ratio
*Initial Conditions, type=field, variable=1
	node_all, 0.0
**  ----------------------------------------------------------  **
*Nset, nset=support-left
  10359
*Nset, nset=support-right
  10414
*Nset, nset=load
  10516,10517,10518,10519,10520,10521
  10523,10524,10525,10526,10527,10528
**
*Nset, nset=center
2538	,
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**  ----------------------------------------------------------  **
***Node
**	100000001, 0, 400
***Nset, nset=node_ref
**	100000001
***MPC
**	BEAM, load, node_ref
**  ----------------------------------------------------------  **
*Amplitude, name=Amp-1, definition=EQUALLY SPACED, fixed interval=1000.
             0.,              10
**  ----------------------------------------------------------  **
*Boundary
	support-left, 2, 2
	support-right, 2, 2
	center, 1, 1
**	node_ref, 1, 1
**  ----------------------------------------------------------  **
**
** STEP: Step-1
**
*Step, name=Step-1, nlgeom=YES
***Dynamic, Explicit
*Dynamic Temperature-displacement, Explicit
	, 1000
*Bulk Viscosity
	0.6, 1.2
**
** BOUNDARY CONDITIONS
**
** Name: BC-2 Type: Displacement/Rotation
*Boundary, amplitude=Amp-1
	load, 2, 2, -0.5
**
** OUTPUT REQUESTS
**
*Restart, write, number interval=1, time marks=NO
**
** FIELD OUTPUT: F-Output-1
**
*Output, field, time interval= 10
*Node Output
	NT, U, RF
*Element Output, directions=YES
	FV, HFL, LE, PE, PEEQ, PEEQVAVG, PEVAVG, S, SDV, TEMP
**
** HISTORY OUTPUT: H-Output-1
**
*Output, history, variable=PRESELECT,time interval= 10
*End Step
